<?xml version="1.0"?>

<!-- Copyright (c) 2018 Joshua Davidson (it0uchpods) -->

<propeller name="fixed-pitch-2-blade">
	<ixx>                4.258 </ixx>
	<diameter unit="IN">  73.2 </diameter>
	<numblades>              2 </numblades>
	<minrpm>                 0 </minrpm>
	<maxrpm>              2477 </maxrpm>
	<gearratio>              1 </gearratio>
	<cp_factor>              1 </cp_factor>
	<ct_factor>              2 </ct_factor>

	<table name="C_THRUST" type="internal">
		<tableData>
			0.00  0.0676
			0.05  0.0640
			0.10  0.0606
			0.15  0.0573
			0.20  0.0542
			0.25  0.0512
			0.30  0.0483
			0.35  0.0456
			0.40  0.0428
			0.45  0.0402
			0.50  0.0376
			0.55  0.0351
			0.60  0.0326
			0.65  0.0302
			0.70  0.0278
			0.75  0.0254
			0.80  0.0230
			0.85  0.0207
			0.90  0.0183
			0.95  0.0159
			1.00  0.0135
			1.05  0.0111
			1.10  0.0087
			1.15  0.0063
			1.20  0.0038
			1.25  0.0013
			1.30 -0.0012
			1.35 -0.0038
			1.40 -0.0064
			1.50 -0.0117
			1.60 -0.0172
			1.70 -0.0230
			1.80 -0.0290
			1.90 -0.0352
			2.00 -0.0417
			2.10 -0.0484
			2.20 -0.0554
			2.30 -0.0627
			2.40 -0.0703
		</tableData>
	</table>

	<table name="C_POWER" type="internal">
		<tableData>
			0.00  0.0439
			0.05  0.0436
			0.10  0.0431
			0.15  0.0425
			0.20  0.0418
			0.25  0.0410
			0.30  0.0401
			0.35  0.0391
			0.40  0.0381
			0.45  0.0369
			0.50  0.0357
			0.55  0.0343
			0.60  0.0328
			0.65  0.0313
			0.70  0.0296
			0.75  0.0278
			0.80  0.0259
			0.85  0.0238
			0.90  0.0217
			0.95  0.0194
			1.00  0.0170
			1.05  0.0144
			1.10  0.0117
			1.15  0.0088
			1.20  0.0058
			1.25  0.0027
			1.30 -0.0007
			1.35 -0.0042
			1.40 -0.0078
			1.50 -0.0157
			1.60 -0.0243
			1.70 -0.0337
			1.80 -0.0439
			1.90 -0.0549
			2.00 -0.0668
			2.10 -0.0796
			2.20 -0.0933
			2.30 -0.1080
			2.40 -0.1236
		</tableData>
	</table>

	<table name="CT_MACH" type="internal">
		<tableData>
			0.85  1.0
			1.05  0.8
		</tableData>
	</table>

	<table name="CP_MACH" type="internal">
		<tableData>
			0.85  1.0
			1.05  1.8
			2.00  1.4
		</tableData>
	</table>

</propeller>
