<?xml version="1.0"?>

<piston_engine name="lycoming-O-320-D3G">
	<ram-air-factor>             1.0 </ram-air-factor>
	<minmp unit="INHG">          8.3 </minmp>
	<maxmp unit="INHG">         28.5 </maxmp>
	<displacement unit="IN3">  319.8 </displacement>
	<bore unit="IN">           5.125 </bore>
	<stroke unit="IN">         3.875 </stroke>
	<cylinders>                    4 </cylinders>
	<compression-ratio>          7.1 </compression-ratio>
	<bsfc unit="LBS/HP*HR">    0.370 </bsfc>
	<volumetric-efficiency>     0.60 </volumetric-efficiency>
	<maxhp>                      162 </maxhp>
	<cycles>                     4.0 </cycles>
	<idlerpm>                  612.0 </idlerpm>
	<maxrpm>                    2685 </maxrpm>
	<numboostspeeds>               1 </numboostspeeds>
	<boostoverride>                0 </boostoverride>
	<ratedboost1>                  6 </ratedboost1>
	<ratedaltitude1>           12000 </ratedaltitude1>
	<ratedpower1>                160 </ratedpower1>
	<ratedrpm1>                 2588 </ratedrpm1>
</piston_engine>
