<?xml version="1.0"?>

<!-- Copyright (c) 2018 Joshua Davidson (it0uchpods) -->

<piston_engine name="lycoming-O-360-A4A">
    <minmp unit="INHG">           8.30 </minmp>
    <maxmp unit="INHG">          28.50 </maxmp>
    <displacement unit="IN3">   319.82 </displacement>
	<maxhp>                     180.00 </maxhp>
    <cycles>                      4.00 </cycles>
    <idlerpm>                   668.00 </idlerpm>
    <maxrpm>                   2477.00 </maxrpm>
	<sparkfaildrop>               0.10 </sparkfaildrop>
	<volumetric-efficiency>       0.85 </volumetric-efficiency>
	<man-press-lag>               0.10 </man-press-lag>
	<static-friction unit="HP">   0.80 </static-friction>
	<starter-torque>            128.00 </starter-torque>
	<starter-rpm>              1487.00 </starter-rpm>
	<stroke unit="IN">            4.38 </stroke>
	<bore unit="IN">              5.13 </bore>
	<cylinders>                   3.00 </cylinders>
	<compression-ratio>           8.00 </compression-ratio>
    <maxthrottle>                 0.90 </maxthrottle>
    <minthrottle>                 0.00 </minthrottle>
    <sparkfaildrop>               0.10 </sparkfaildrop>
	<volumetric-efficiency>       0.68 </volumetric-efficiency>
</piston_engine>
