<?xml version="1.0"?>
<?xml-stylesheet type="text/xsl" href="http://jsbsim.sourceforge.net/JSBSim.xsl"?>

<!-- Copyright (c) 2018 Joshua Davidson (it0uchpods) -->

<?xml-stylesheet href="JSBSim.xsl" type="application/xml"?>
<fdm_config name="PA28-Warrior" version="2.0" release="BETA"
xmlns:xsi="http://www.w3.org/2001/XMLSchema-instance"
xsi:noNamespaceSchemaLocation="http://jsbsim.sourceforge.net/JSBSim.xsd">

	<fileheader>
		<author>Joshua Davidson (it0uchpods)</author>
		<version>Pre V1.0</version>
		<description>PA28-161 Warrior II FDE</description>
	</fileheader>

	<metrics>
		<wingarea unit="FT2">  160.00 </wingarea>
		<wingspan unit="FT">    30.00 </wingspan>
		<chord unit="FT">        5.18 </chord>
		<htailarea unit="FT2">  37.18 </htailarea>
		<htailarm unit="FT">    15.10 </htailarm>
		<vtailarea unit="FT2">  28.60 </vtailarea>
		<vtailarm unit="FT">     8.72 </vtailarm>

		<location name="AERORP" unit="M">
			<x> 2.5011 </x>
			<y> 0 </y>
			<z> 0.2512 </z>
		</location>

		<location name="EYEPOINT" unit="M">
			<x> 1.9543 </x>
			<y> -0.2618 </y>
			<z> 0.5289 </z>
		</location>

		<location name="VRP" unit="M">
			<x> 0 </x>
			<y> 0 </y>
			<z> 0 </z>
		</location>
	</metrics>

	<mass_balance>
		<ixx unit="SLUG*FT2">  387 </ixx>
		<iyy unit="SLUG*FT2">  546 </iyy>
		<izz unit="SLUG*FT2"> 1167 </izz>

		<ixy unit="SLUG*FT2">    0 </ixy>
		<ixz unit="SLUG*FT2">    0 </ixz>
		<iyz unit="SLUG*FT2">    0 </iyz>
		<emptywt unit="LBS" > 1201 </emptywt>

		<location name="CG" unit="M">
			<x> 2.5003 </x>
			<y> 0 </y>
			<z> 0.2512 </z>
		</location>

		<pointmass name="Pilot">
			<weight unit="LBS"> 200.0 </weight>
			<location name="POINTMASS" unit="M">
				<x> 2.5003 </x>
				<y> 0 </y>
				<z> 0.2512 </z>
			</location>
		</pointmass>

		<pointmass name="Right Seat">
			<weight unit="LBS"> 200.0 </weight>
			<location name="POINTMASS" unit="M">
				<x> 2.5003 </x>
				<y> 0 </y>
				<z> 0.2512 </z>
			</location>
		</pointmass>
	</mass_balance>

	<ground_reactions>
		<contact type="BOGEY" name="NOSE">
			<location unit="M">
				<x> 0.95194 </x>
				<y> 0 </y>
				<z> -1.26984 </z>
			</location>
			<static_friction> 0.4 </static_friction>
			<dynamic_friction> 0.6 </dynamic_friction>
			<rolling_friction> 0.02 </rolling_friction>
			<spring_coeff unit="LBS/FT"> 5400 </spring_coeff>
			<damping_coeff unit="LBS/FT/SEC"> 1600 </damping_coeff>
			<max_steer unit="DEG"> 10 </max_steer>
			<brake_group> NONE </brake_group>
			<retractable>1</retractable>
		</contact>
		<contact type="BOGEY" name="LEFT_MAIN">
			<location unit="M">
				<x> 2.89843 </x>
				<y> -1.52593 </y>
				<z> -1.26621 </z>
			</location>
			<static_friction> 0.4 </static_friction>
			<dynamic_friction> 0.6 </dynamic_friction>
			<rolling_friction> 0.02 </rolling_friction>
			<spring_coeff unit="LBS/FT"> 5400 </spring_coeff>
			<damping_coeff unit="LBS/FT/SEC"> 1600 </damping_coeff>
			<max_steer unit="DEG"> 0.0 </max_steer>
			<brake_group> LEFT </brake_group>
			<retractable>1</retractable>
		</contact>
		<contact type="BOGEY" name="RIGHT_MAIN">
			<location unit="M">
				<x> 2.89843 </x>
				<y> 1.52593 </y>
				<z> -1.26621 </z>
			</location>
			<static_friction> 0.4 </static_friction>
			<dynamic_friction> 0.6 </dynamic_friction>
			<rolling_friction> 0.02 </rolling_friction>
			<spring_coeff unit="LBS/FT"> 5400 </spring_coeff>
			<damping_coeff unit="LBS/FT/SEC"> 1600 </damping_coeff>
			<max_steer unit="DEG"> 0.0 </max_steer>
			<brake_group> RIGHT </brake_group>
			<retractable>1</retractable>
		</contact>

		<contact type="STRUCTURE" name="NOSE_1">
			<location unit="M">
				<x> 2.6272 </x>
				<y> 0 </y>
				<z> 0.63716 </z>
			</location>
			<static_friction> 1.0 </static_friction>
			<dynamic_friction> 0.4 </dynamic_friction>
			<rolling_friction> 0.4 </rolling_friction>
			<spring_coeff unit="LBS/FT"> 50000 </spring_coeff>
			<damping_coeff unit="LBS/FT/SEC"> 50000 </damping_coeff>
			<max_steer unit="DEG"> 0.0 </max_steer>
			<brake_group> NONE </brake_group>
			<retractable>0</retractable>
		</contact>
		<contact type="STRUCTURE" name="NOSE_2">
			<location unit="M">
				<x> 5.0858 </x>
				<y> 0 </y>
				<z> 1.34919 </z>
			</location>
			<static_friction> 1.0 </static_friction>
			<dynamic_friction> 0.4 </dynamic_friction>
			<rolling_friction> 0.4 </rolling_friction>
			<spring_coeff unit="LBS/FT"> 50000 </spring_coeff>
			<damping_coeff unit="LBS/FT/SEC"> 50000 </damping_coeff>
			<max_steer unit="DEG"> 0.0 </max_steer>
			<brake_group> NONE </brake_group>
			<retractable>0</retractable>
		</contact>

		<contact type="STRUCTURE" name="BOTTOM_1">
			<location unit="M">
				<x> 0.73133 </x>
				<y> 0 </y>
				<z> -0.45404 </z>
			</location>
			<static_friction> 1.0 </static_friction>
			<dynamic_friction> 0.4 </dynamic_friction>
			<rolling_friction> 0.4 </rolling_friction>
			<spring_coeff unit="LBS/FT"> 50000 </spring_coeff>
			<damping_coeff unit="LBS/FT/SEC"> 50000 </damping_coeff>
			<max_steer unit="DEG"> 0.0 </max_steer>
			<brake_group> NONE </brake_group>
			<retractable>0</retractable>
		</contact>
		<contact type="STRUCTURE" name="BOTTOM_2">
			<location unit="M">
				<x> 4.01798 </x>
				<y> 0 </y>
				<z> -0.48431 </z>
			</location>
			<static_friction> 1.0 </static_friction>
			<dynamic_friction> 0.4 </dynamic_friction>
			<rolling_friction> 0.4 </rolling_friction>
			<spring_coeff unit="LBS/FT"> 50000 </spring_coeff>
			<damping_coeff unit="LBS/FT/SEC"> 50000 </damping_coeff>
			<max_steer unit="DEG"> 0.0 </max_steer>
			<brake_group> NONE </brake_group>
			<retractable>0</retractable>
		</contact>

		<contact type="STRUCTURE" name="TOP_1">
			<location unit="M">
				<x> 2.17024 </x>
				<y> 0 </y>
				<z> 0.63716 </z>
			</location>
			<static_friction> 1.0 </static_friction>
			<dynamic_friction> 0.4 </dynamic_friction>
			<rolling_friction> 0.4 </rolling_friction>
			<spring_coeff unit="LBS/FT"> 50000 </spring_coeff>
			<damping_coeff unit="LBS/FT/SEC"> 50000 </damping_coeff>
			<max_steer unit="DEG"> 0.0 </max_steer>
			<brake_group> NONE </brake_group>
			<retractable>0</retractable>
		</contact>
		<contact type="STRUCTURE" name="TOP_2">
			<location unit="M">
				<x> 5.35269 </x>
				<y> 0 </y>
				<z> 0.59428 </z>
			</location>
			<static_friction> 1.0 </static_friction>
			<dynamic_friction> 0.4 </dynamic_friction>
			<rolling_friction> 0.4 </rolling_friction>
			<spring_coeff unit="LBS/FT"> 50000 </spring_coeff>
			<damping_coeff unit="LBS/FT/SEC"> 50000 </damping_coeff>
			<max_steer unit="DEG"> 0.0 </max_steer>
			<brake_group> NONE </brake_group>
			<retractable>0</retractable>
		</contact>

		<contact type="STRUCTURE" name="ENG">
			<location unit="M">
				<x> 0 </x>
				<y> 0 </y>
				<z> 0 </z>
			</location>
			<static_friction> 1.0 </static_friction>
			<dynamic_friction> 0.4 </dynamic_friction>
			<rolling_friction> 0.4 </rolling_friction>
			<spring_coeff unit="LBS/FT"> 50000 </spring_coeff>
			<damping_coeff unit="LBS/FT/SEC"> 50000 </damping_coeff>
			<max_steer unit="DEG"> 0.0 </max_steer>
			<brake_group> NONE </brake_group>
			<retractable>0</retractable>
		</contact>

		<contact type="STRUCTURE" name="TAIL_1">
			<location unit="M">
				<x> 6.81551 </x>
				<y> 0 </y>
				<z> 0.11124 </z>
			</location>
			<static_friction> 1.0 </static_friction>
			<dynamic_friction> 0.4 </dynamic_friction>
			<rolling_friction> 0.4 </rolling_friction>
			<spring_coeff unit="LBS/FT"> 50000 </spring_coeff>
			<damping_coeff unit="LBS/FT/SEC"> 50000 </damping_coeff>
			<max_steer unit="DEG"> 0.0 </max_steer>
			<brake_group> NONE </brake_group>
			<retractable>0</retractable>
		</contact>
		<contact type="STRUCTURE" name="TAIL_2">
			<location unit="M">
				<x> 6.73816 </x>
				<y> 0 </y>
				<z> 1.68697 </z>
			</location>
			<static_friction> 1.0 </static_friction>
			<dynamic_friction> 0.4 </dynamic_friction>
			<rolling_friction> 0.4 </rolling_friction>
			<spring_coeff unit="LBS/FT"> 50000 </spring_coeff>
			<damping_coeff unit="LBS/FT/SEC"> 50000 </damping_coeff>
			<max_steer unit="DEG"> 0.0 </max_steer>
			<brake_group> NONE </brake_group>
			<retractable>0</retractable>
		</contact>

		<contact type="STRUCTURE" name="WING_TIP_1">
			<location unit="M">
				<x> 2.70937 </x>
				<y> -5.179 </y>
				<z> 0.10837 </z>
			</location>
			<static_friction> 1.0 </static_friction>
			<dynamic_friction> 0.4 </dynamic_friction>
			<rolling_friction> 0.4 </rolling_friction>
			<spring_coeff unit="LBS/FT"> 50000 </spring_coeff>
			<damping_coeff unit="LBS/FT/SEC"> 50000 </damping_coeff>
			<max_steer unit="DEG"> 0.0 </max_steer>
			<brake_group> NONE </brake_group>
			<retractable>0</retractable>
		</contact>
		<contact type="STRUCTURE" name="WING_TIP_2">
			<location unit="M">
				<x> 2.70937 </x>
				<y> 5.179 </y>
				<z> 0.10837 </z>
			</location>
			<static_friction> 1.0 </static_friction>
			<dynamic_friction> 1 </dynamic_friction>
			<rolling_friction> 1 </rolling_friction>
			<spring_coeff unit="LBS/FT"> 50000 </spring_coeff>
			<damping_coeff unit="LBS/FT/SEC"> 50000 </damping_coeff>
			<max_steer unit="DEG"> 0.0 </max_steer>
			<brake_group> NONE </brake_group>
			<retractable>0</retractable>
		</contact>
	</ground_reactions>

	<propulsion>
		<engine file="lycoming-O-320-D3G">
			<location unit="M">
				<x> 0.41157 </x>
				<y> 0 </y>
				<z> 0 </z>
			</location>
			<orient unit="DEG">
				<roll>0.00</roll>
				<pitch>0.00</pitch>
				<yaw>0.00</yaw>
			</orient>
			<feed>2</feed>
			<thruster file="fixed-pitch-2-blade">
				<location unit="M">
					<x> 0.41157 </x>
					<y> 0 </y>
					<z> 0 </z>
				</location>
				<orient unit="DEG">
				<roll>0.00</roll>
				<pitch>0.00</pitch>
				<yaw>0.00</yaw>
				</orient>
				<sense>1</sense>
				<p_factor>1</p_factor>
			</thruster>
		</engine>

		<tank type="FUEL">    <!-- Left Wing Tank -->
			<location unit="M">
				<x> 2.400 </x>
				<y> -1.9642 </y>
				<z> 0.0392 </z>
			</location>
			<radius unit="M">13.3</radius>
			<capacity unit="LBS">168.0</capacity>
			<contents unit="LBS">119.0</contents>
			<type>AVGAS</type>
			<priority>1</priority>
		</tank>
		<tank type="FUEL">    <!-- Right Wing Tank -->
			<location unit="M">
				<x> 2.400 </x>
				<y> 1.9642 </y>
				<z> 0.0392 </z>
			</location>
			<radius unit="M">13.3</radius>
			<capacity unit="LBS">168.0</capacity>
			<contents unit="LBS">119.0</contents>
			<type>AVGAS</type>
			<priority>1</priority>
		</tank>
		<tank type="FUEL">    <!-- Engine Pipes -->
			<location unit="M">
				<x> 2.5003 </x>
				<y> 0 </y>
				<z> 0.2512 </z>
			</location>
			<capacity unit="LBS">0.01</capacity>
			<contents unit="LBS">0.00</contents>
			<type>AVGAS</type>
			<priority>1</priority>
		</tank>
	</propulsion>

	<system file="pa28-fcs" />
	<system file="fuel" />

	<flight_control name="none" />

	<aerodynamics file="Systems/pa28-aerodynamics.xml" />
</fdm_config>
