<?xml version="1.0"?>

<!-- Copyright (c) 2017 Joshua Davidson (it0uchpods) -->

<?xml-stylesheet href="JSBSim.xsl" type="application/xml"?>
<fdm_config name="PA28-161" version="2.0" release="BETA"
xmlns:xsi="http://www.w3.org/2001/XMLSchema-instance"
xsi:noNamespaceSchemaLocation="http://jsbsim.sourceforge.net/JSBSim.xsd">

	<fileheader>
		<author>Joshua Davidson (it0uchpods)</author>
		<version>Pre V1.0</version>
		<description>PA28-161 Warrior II FDE</description>
	</fileheader>

	<metrics>
		<wingarea unit="FT2">  160.0000 </wingarea>
		<wingspan unit="FT">    30.0000 </wingspan>
		<chord unit="FT">        5.1800 </chord>
		<htailarea unit="FT2">  37.1800 </htailarea>
		<htailarm unit="FT">       15.1 </htailarm>
		<vtailarea unit="FT2">  28.5957 </vtailarea>
		<vtailarm unit="FT">     8.7165 </vtailarm>
		<location name="AERORP" unit="IN">
			<x>89.1</x>
			<y>0</y>
			<z>0.3795</z>
		</location>

		<location name="EYEPOINT" unit="IN">
			<x>76.9425</x>
			<y>-10.3102</y>
			<z>20.8263</z>
		</location>

		<location name="VRP" unit="IN">
			<x>0</x>
			<y>0</y>
			<z>0</z>
		</location>
	</metrics>

	<mass_balance>
		<ixx unit="SLUG*FT2">  948 </ixx>
		<iyy unit="SLUG*FT2"> 1346 </iyy>
		<izz unit="SLUG*FT2"> 1967 </izz>
		<ixy unit="SLUG*FT2">    0 </ixy>
		<ixz unit="SLUG*FT2">    0 </ixz>
		<iyz unit="SLUG*FT2">    0 </iyz>
		<emptywt unit="LBS">  1201 </emptywt>
		<location name="CG" unit="IN">
			<x>94.5</x>
			<y>0</y>
			<z>0.3795</z>
		</location>

		<pointmass name="Pilot">
			<weight unit="LBS"> 200.0 </weight>
			<location name="POINTMASS" unit="IN">
				<x>94.5</x>
				<y>0</y>
				<z>0.3795</z>
			</location>
		</pointmass>

		<pointmass name="Right Seat">
			<weight unit="LBS"> 200.0 </weight>
			<location name="POINTMASS" unit="IN">
				<x>94.5</x>
				<y>0</y>
				<z>0.3795</z>
			</location>
		</pointmass>
	</mass_balance>

	<ground_reactions>
		<contact type="BOGEY" name="NOSE">
			<location unit="IN">
				<x>41.6728</x>
				<y>0</y>
				<z>-42.2421</z>
			</location>
			<static_friction> 0.82 </static_friction>
			<dynamic_friction> 0.5 </dynamic_friction>
			<rolling_friction> 0.03 </rolling_friction>
			<spring_coeff unit="LBS/FT"> 5400 </spring_coeff>
			<damping_coeff unit="LBS/FT/SEC"> 1600 </damping_coeff>
			<max_steer unit="DEG"> 10 </max_steer>
			<brake_group> NONE </brake_group>
			<retractable>1</retractable>
		</contact>

		<contact type="BOGEY" name="LEFT_MAIN">
			<location unit="IN">
				<x>112.2342</x>
				<y>-59.0551</y>
				<z>-42.1177</z>
			</location>
			<static_friction> 1.95</static_friction>
			<dynamic_friction> 0.7 </dynamic_friction>
			<rolling_friction> 0.03 </rolling_friction>
			<spring_coeff unit="LBS/FT"> 5400 </spring_coeff>
			<damping_coeff unit="LBS/FT/SEC"> 1600 </damping_coeff>
			<max_steer unit="DEG"> 0.0 </max_steer>
			<brake_group> LEFT </brake_group>
			<retractable>1</retractable>
		</contact>

		<contact type="BOGEY" name="RIGHT_MAIN">
			<location unit="IN">
				<x>112.2342</x>
				<y>59.0551</y>
				<z>-42.1177</z>
			</location>
			<static_friction> 1.95</static_friction>
			<dynamic_friction> 0.7 </dynamic_friction>
			<rolling_friction> 0.03 </rolling_friction>
			<spring_coeff unit="LBS/FT"> 5400 </spring_coeff>
			<damping_coeff unit="LBS/FT/SEC"> 1600 </damping_coeff>
			<max_steer unit="DEG"> 0.0 </max_steer>
			<brake_group> RIGHT </brake_group>
			<retractable>1</retractable>
		</contact>

		<contact type="STRUCTURE" name="TAIL">
			<location unit="IN">
				<x>266.4515</x>
				<y>0</y>
				<z>0.3795</z>
			</location>
			<static_friction> 0.2 </static_friction>
			<dynamic_friction> 0.2 </dynamic_friction>
			<spring_coeff unit="LBS/FT"> 20000 </spring_coeff>
			<damping_coeff unit="LBS/FT/SEC"> 1000 </damping_coeff>
		</contact>

		<contact type="STRUCTURE" name="NOSE">
			<location unit="IN">
				<x>24.2889</x>
				<y>0</y>
				<z>-15.4629</z>
			</location>
			<static_friction> 0.2 </static_friction>
			<dynamic_friction> 0.2 </dynamic_friction>
			<spring_coeff unit="LBS/FT"> 10000 </spring_coeff>
			<damping_coeff unit="LBS/FT/SEC"> 2000 </damping_coeff>
		</contact>

		<contact type="STRUCTURE" name="LEFT_WING">
			<location unit="IN">
				<x>94.5161</x>
				<y>-201.2543</y>
				<z>1.5452</z>
			</location>
			<static_friction> 0.2 </static_friction>
			<dynamic_friction> 0.2 </dynamic_friction>
			<spring_coeff unit="LBS/FT"> 10000 </spring_coeff>
			<damping_coeff unit="LBS/FT/SEC"> 2000 </damping_coeff>
		</contact>

		<contact type="STRUCTURE" name="RIGHT_WING">
			<location unit="IN">
				<x>94.5161</x>
				<y>201.2543</y>
				<z>1.5452</z>
			</location>
			<static_friction> 0.2 </static_friction>
			<dynamic_friction> 0.2 </dynamic_friction>
			<spring_coeff unit="LBS/FT"> 10000 </spring_coeff>
			<damping_coeff unit="LBS/FT/SEC"> 2000 </damping_coeff>
		</contact>
	</ground_reactions>

	<propulsion>
		<engine file="lycoming-O-360-A4A">
			<location unit="IN">
				<x>15.0748</x>
				<y>0</y>
				<z>0.0838</z>
			</location>
			<orient unit="DEG">
				<roll>0.00</roll>
				<pitch>0.00</pitch>
				<yaw>0.00</yaw>
			</orient>
			<feed>2</feed>
			<thruster file="fixed-pitch-2-blade">
				<location unit="IN">
					<x>15.0748</x>
					<y>0</y>
					<z>0.0838</z>
				</location>
				<orient unit="DEG">
				<roll>0.00</roll>
				<pitch>0.00</pitch>
				<yaw>0.00</yaw>
				</orient>
				<sense>1</sense>
				<p_factor>1</p_factor>
			</thruster>
		</engine>

		<!-- Left Tank -->
		<tank type="FUEL">
			<location unit="IN">
				<x>94.5161</x>
				<y>-77.3346</y>
				<z>1.5452</z>
			</location>
			<radius unit="IN">13.3</radius>
			<capacity unit="LBS">168.0</capacity>
			<contents unit="LBS">119.0</contents>
			<type>AVGAS</type>
			<priority>1</priority>
		</tank>
		<!-- Right Tank -->
		<tank type="FUEL">
			<location unit="IN">
				<x>94.5161</x>
				<y>77.3346</y>
				<z>1.5452</z>
			</location>
			<radius unit="IN">13.3</radius>
			<capacity unit="LBS">168.0</capacity>
			<contents unit="LBS">119.0</contents>
			<type>AVGAS</type>
			<priority>1</priority>
		</tank>
		<!-- Engine Pipe -->
		<tank type="FUEL">
			<location unit="IN">
				<x>94.5</x>
				<y>0</y>
				<z>0.3795</z>
			</location>
			<capacity unit="LBS">0.01</capacity>
			<contents unit="LBS">0.00</contents>
			<type>AVGAS</type>
			<priority>1</priority>
		</tank>
	</propulsion>

	<system file="fcs" />
	<system file="fuel" />

	<flight_control name="none" />

	<aerodynamics file="Systems/pa28-161-aerodynamics.xml" />

</fdm_config>
